Wed Apr 22 10:31:31 CST 2026
;; 1. Based on:
;; 2. Description: 1 com
;; x1. Author: user
;Project Name: 001
;Project ID: NO PROJECT DESCRIPTION
$PROBLEM    PK_Warfarin.R
$INPUT      C ID TIME DV ADDL II AMT CMT SEX AGE HEG WEG CYP
$DATA      warfarinRCO.csv IGNORE=C
$SUBROUTINE ADVAN2 TRANS2
$PK
CL=THETA(1)*EXP(ETA(1))
V=THETA(2)*EXP(ETA(2))
KA=THETA(3)
S2=V

$ERROR
DEL=0
IF (F.LE.0.0001) DEL=1
IPRED=F
W1= F
W2= 1
IRES= DV-IPRED
IWRES=IRES/(W1+W2)
Y = F + W1*ERR(1) + W2*ERR(2)

$THETA  (0,0.16) ; [CL]
 (4,8) ; [V]
 0.36 FIX ; [KA]
$OMEGA  0.2  ; [CL] omega(1,1)
 0.2  ; [V] omega(2,2)
$SIGMA  0.2  ; [A] sigma(2,2)
 0.2  ; [A] sigma(2,2)_
$ESTIMATION METHOD=1 INTE PRINT=5 MAX=9999 SIG=3 POSTHOC MSFO=005.MSF
; Xpose
$COVARIANCE
$TABLE      ID TIME DV AMT ADDL II CMT EVID MDV IPRED PRED IWRES CWRES
            ONEHEADER NOPRINT FILE=sdtab1
$TABLE      ID CL V KA ETA1 ETA2 ONEHEADER NOPRINT FILE=patab1
$TABLE      ID AGE WEG HEG NOPRINT NOAPPEND ONEHEADER FILE=cotab1
$TABLE      ID CYP NOPRINT ONEHEADER FILE=catab1

NM-TRAN MESSAGES
 WARNINGS AND ERRORS (IF ANY) FOR PROBLEM    1
 (WARNING  2) NM-TRAN INFERS THAT THE DATA ARE POPULATION.
Note: Analytical 2nd Derivatives are constructed in FSUBS but are never used.
      You may insert $ABBR DERIV2=NO after the first $PROB to save FSUBS construction and compilation time

1NONLINEAR MIXED EFFECTS MODEL PROGRAM (NONMEM) VERSION 7.6.0 (nm760)
 ORIGINALLY DEVELOPED BY STUART BEAL, LEWIS SHEINER, AND ALISON BOECKMANN
 CURRENT DEVELOPERS ARE ROBERT BAUER, ICON DEVELOPMENT SOLUTIONS,
 AND ALISON BOECKMANN. IMPLEMENTATION, EFFICIENCY, AND STANDARDIZATION
 PERFORMED BY NOUS INFOSYSTEMS.
 PROBLEM NO.:         1
 PK_Warfarin.R
 TOT. NO. OF OBS RECS:      727
 TOT. NO. OF INDIVIDUALS:      136
 ONE COMPARTMENT MODEL WITH FIRST-ORDER ABSORPTION (ADVAN2)
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 #TBLN:      1
 #METH: First Order Conditional Estimation with Interaction
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
 #TERM:
0MINIMIZATION SUCCESSFUL
 NO. OF FUNCTION EVALUATIONS USED:      259
 NO. OF SIG. DIGITS IN FINAL EST.:  3.2

 ETABAR IS THE ARITHMETIC MEAN OF THE ETA-ESTIMATES,
 AND THE P-VALUE IS GIVEN FOR THE NULL HYPOTHESIS THAT THE TRUE MEAN IS 0.

 ETABAR:        -2.6385E-03  7.3296E-03
 SE:             2.2877E-02  2.7772E-02
 N:                     136         136

 P VAL.:         9.0818E-01  7.9185E-01

 ETASHRINKSD(%)  7.3474E+00  2.5191E+01
 ETASHRINKVR(%)  1.4155E+01  4.4036E+01
 EBVSHRINKSD(%)  7.2928E+00  2.5483E+01
 EBVSHRINKVR(%)  1.4054E+01  4.4473E+01
 RELATIVEINF(%)  8.5904E+01  5.5500E+01
 EPSSHRINKSD(%)  1.3330E+01  1.3330E+01
 EPSSHRINKVR(%)  2.4882E+01  2.4882E+01


 TOTAL DATA POINTS NORMALLY DISTRIBUTED (N):          727
 N*LOG(2PI) CONSTANT TO OBJECTIVE FUNCTION:    1336.1366272795940
 OBJECTIVE FUNCTION VALUE WITHOUT CONSTANT:    7757.5232460435291
 OBJECTIVE FUNCTION VALUE WITH CONSTANT:       9093.6598733231222
 REPORTED OBJECTIVE FUNCTION DOES NOT CONTAIN CONSTANT

 TOTAL EFFECTIVE ETAS (NIND*NETA):                           272


 #TERE:
 Elapsed estimation  time in seconds:     1.98
 Elapsed covariance  time in seconds:     0.96
 Elapsed postprocess time in seconds:     0.02

 ********************               FIRST ORDER CONDITIONAL ESTIMATION WITH INTERACTION              ********************
 #OBJT:**************                       MINIMUM VALUE OF OBJECTIVE FUNCTION                      ********************
 #OBJV:********************************************          7757.523       *********************************************

 ********************               FIRST ORDER CONDITIONAL ESTIMATION WITH INTERACTION              ********************
 ********************                             FINAL PARAMETER ESTIMATE                           ********************

 THETA - VECTOR OF FIXED EFFECTS PARAMETERS   *********
         TH 1      TH 2      TH 3
         1.78E-01  1.90E+01  3.60E-01

 OMEGA - COV MATRIX FOR RANDOM EFFECTS - ETAS  ********
         ETA1      ETA2
 ETA1
+        8.29E-02
 ETA2
+        0.00E+00  1.88E-01

 SIGMA - COV MATRIX FOR RANDOM EFFECTS - EPSILONS  ****
         EPS1      EPS2
 EPS1
+        4.17E-02
 EPS2
+        0.00E+00  5.62E+02

 OMEGA - CORR MATRIX FOR RANDOM EFFECTS - ETAS  *******
         ETA1      ETA2
 ETA1
+        2.88E-01
 ETA2
+        0.00E+00  4.33E-01

 SIGMA - CORR MATRIX FOR RANDOM EFFECTS - EPSILONS  ***
         EPS1      EPS2
 EPS1
+        2.04E-01
 EPS2
+        0.00E+00  2.37E+01

 ********************               FIRST ORDER CONDITIONAL ESTIMATION WITH INTERACTION              ********************
 ********************                            STANDARD ERROR OF ESTIMATE                          ********************

 THETA - VECTOR OF FIXED EFFECTS PARAMETERS   *********
         TH 1      TH 2      TH 3
         4.77E-03  9.72E-01 .........

 OMEGA - COV MATRIX FOR RANDOM EFFECTS - ETAS  ********
         ETA1      ETA2
 ETA1
+        1.11E-02
 ETA2
+       .........  4.59E-02

 SIGMA - COV MATRIX FOR RANDOM EFFECTS - EPSILONS  ****
         EPS1      EPS2
 EPS1
+        5.67E-03
 EPS2
+       .........  4.28E+02

 OMEGA - CORR MATRIX FOR RANDOM EFFECTS - ETAS  *******
         ETA1      ETA2
 ETA1
+        1.92E-02
 ETA2
+       .........  5.30E-02

 SIGMA - CORR MATRIX FOR RANDOM EFFECTS - EPSILONS  ***
         EPS1      EPS2
 EPS1
+        1.39E-02
 EPS2
+       .........  9.02E+00

 ********************               FIRST ORDER CONDITIONAL ESTIMATION WITH INTERACTION              ********************
 ********************                          COVARIANCE MATRIX OF ESTIMATE                         ********************

            TH 1      TH 2      TH 3      OM11      OM12      OM22      SG11      SG12      SG22
 TH 1
+        2.28E-05
 TH 2
+        1.03E-03  9.44E-01
 TH 3
+       ......... ......... .........
 OM11
+        7.46E-06 -3.06E-04 .........  1.22E-04
 OM12
+       ......... ......... ......... ......... .........
 OM22
+       -5.68E-05 -1.07E-02 .........  1.37E-04 .........  2.11E-03
 SG11
+        4.05E-06 -5.16E-04 .........  6.56E-07 .........  2.24E-05  3.22E-05
 SG12
+       ......... ......... ......... ......... ......... ......... ......... .........
 SG22
+       -9.34E-02 -4.10E+01 ......... -4.86E-01 ......... -5.02E+00 -1.41E+00 .........  1.83E+05

 ********************               FIRST ORDER CONDITIONAL ESTIMATION WITH INTERACTION              ********************
 ********************                          CORRELATION MATRIX OF ESTIMATE                        ********************

            TH 1      TH 2      TH 3      OM11      OM12      OM22      SG11      SG12      SG22
 TH 1
+        4.77E-03
 TH 2
+        2.22E-01  9.72E-01
 TH 3
+       ......... ......... .........
 OM11
+        1.41E-01 -2.85E-02 .........  1.11E-02
 OM12
+       ......... ......... ......... ......... .........
 OM22
+       -2.59E-01 -2.39E-01 .........  2.70E-01 .........  4.59E-02
 SG11
+        1.50E-01 -9.37E-02 .........  1.05E-02 .........  8.62E-02  5.67E-03
 SG12
+       ......... ......... ......... ......... ......... ......... ......... .........
 SG22
+       -4.57E-02 -9.88E-02 ......... -1.03E-01 ......... -2.56E-01 -5.83E-01 .........  4.28E+02
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 Elapsed finaloutput time in seconds:     0.03
 #CPUT: Total CPU Time in Seconds,        3.037
